Simulations: Version=201
  DataStore
  Simulation TestApple
    Clock: Start=2021-01-01; End=2024-12-31
    Summary SummaryFile
    Weather: FileName=C:/GitHubRepos/ApsimX/Prototypes/Apple/la tallada.met
    MicroClimate: a_interception=0; b_interception=1; c_interception=0; d_interception=0; SoilHeatFluxFraction=0.4; MinimumHeightDiffForNewLayer=0; NightInterceptionFraction=0.5; ReferenceHeight=2
    SoilArbitrator Soil Arbitrator
    Manager AutoIrrigationDeficitBased
      AllowIrrigation = True
      depthPAWC = 1000
      triggerDeficit = 80
      irrigateAmount = 15
      returndays = 3
      IrrigateAlley = True
```csharp
using APSIM.Core;
using Models.Interfaces;
using System;
using Models.Core;
using Models.PMF;
using Models.Soils;
using System.Xml.Serialization;
using APSIM.Shared.Utilities;
using Newtonsoft.Json;

        
namespace Models
{
    [Serializable] 
    [System.Xml.Serialization.XmlInclude(typeof(Model))]
    public class Script : Model, IStructureDependency
    {
        [Link] private Clock Clock;
        [Link] private Zone patch;
        [Link] private ISummary summary;
        [Link] private Soil Soil;
        [Link(IsOptional = true)] private IPlant existingCrop;
        [Link] private IPhysical soilPhysical;
        [Link] private ISoilWater waterBalance;
        [Link(Type = LinkType.Scoped, ByName = true)] private Zone Row;
        [Link(Type = LinkType.Scoped, ByName = true)] private Zone Alley;
        private double TopDUL;
        private double TopLL;
        private int nLayers;
        public IStructure Structure { private get; set; }
        //[Link] private Irrigation Irrigation;
       
        // Parameters from user interface
        [Separator("Manager for controlling automatic irrigation")]
        [Description(" Allow this manager to control irrigation?")]
        public bool AllowIrrigation { get; set; }
      
        [Separator(" Parameters for the irrigation system")]
        [Description(" Depth to calculate PAWC and deficit (mm)")]
        public double depthPAWC { get; set; }
        [Description(" Deficit to trigger irrigations (% PAWC)")]
        public double triggerDeficit { get; set; }
        [Description(" Irrigation amount to apply each event (mm)")]
        public double irrigateAmount { get; set; }
        [Description(" Minimum days for irrigation to return")]
        public double returndays { get; set; }
        
        [Description("Is the Alley zone irrigated?")]
        public bool IrrigateAlley {get; set;}

        //Class members
        [JsonIgnore] public double IrrigLayerSWDeficit { get; set; }
        [JsonIgnore] public double TopSWC { get; set; }
        [JsonIgnore] public double DaysSinceIrrigation { get; set; }
        [JsonIgnore] public double AmountToApply { get; set; }
        [JsonIgnore] public double SeasonAppliedAmount { get; set; }
        
        private bool IrrigationIsAllowed { get; set; }
        private bool CropIsActive { get; set; }
        private bool IrrigatorIsAvailable { get; set; }
        private bool SoilIsDry { get; set; }

    
        //Calculate static soil variables

        

        [EventSubscribe("StartOfSimulation")]
        private void OnStartOfSimulation(object sender, EventArgs e)
        {
            
            //Can we irrigate at all?
            IrrigationIsAllowed = false; 
            if (AllowIrrigation)
                IrrigationIsAllowed = true; 

            //Calculate soil water variables
            double depthFromSurface = 0.0;
            double fracLayer = 0.0;
            nLayers = soilPhysical.Thickness.Length;
            for (int layer = 0; layer < nLayers; layer++)
            {
                fracLayer = Math.Min(1.0, (depthPAWC - depthFromSurface) / soilPhysical.Thickness[layer]);
                TopLL += soilPhysical.LL15mm[layer] * fracLayer;
                TopDUL += soilPhysical.DULmm[layer] * fracLayer;
                depthFromSurface += soilPhysical.Thickness[layer];
                if (depthFromSurface >= depthPAWC)
                    layer = nLayers;
            }
        }
             
        //Determine daily requirement for irrigation
        [EventSubscribe("StartOfDay")]
        private void OnStartOfDay(object sender, EventArgs e)
        {
            AmountToApply = 0.0;
            DaysSinceIrrigation += 1;

            //Is the row crop actively growing?
            CropIsActive = false;
            double StageCode = (double)Structure.Get("Apple.Phenology.Stage", relativeTo: Row);
            if ((StageCode > 3.0) && (StageCode<5.0))
            {
                CropIsActive = true;
            }
          
            //Is the irrigator available?
            IrrigatorIsAvailable = false;
            if (DaysSinceIrrigation >= returndays)
                IrrigatorIsAvailable = true;
          
            //Is the soil dry enough to require irrigation?
            SoilIsDry = false;
            double depthFromSurface = 0.0;
            double fracLayer = 0.0;
            TopSWC = 0.0;
            for (int layer = 0; layer < nLayers; layer++)
            //for (int layer = 0; depthFromSurface < depthPAWC + soilPhysical.Thickness[layer]; layer++)
            {
                fracLayer = Math.Min(1.0, (depthPAWC - depthFromSurface) / soilPhysical.Thickness[layer]);
                TopSWC += waterBalance.SWmm[layer] * fracLayer;
                depthFromSurface += soilPhysical.Thickness[layer];
                if (depthFromSurface >= depthPAWC)
                    layer = nLayers;
            }
            
            IrrigLayerSWDeficit = TopSWC - TopDUL;
            if (Math.Max(0.0, -IrrigLayerSWDeficit) >= (TopDUL - TopLL) * (100 - triggerDeficit) / 100)
                SoilIsDry = true;

            //Are all the conditions ratifying irrigation
            if (IrrigationIsAllowed && CropIsActive && IrrigatorIsAvailable && SoilIsDry)
            {
                //Lets irrigate well !!!!
                Irrigation irrigRow = (Irrigation)Structure.Get("Irrigation", relativeTo: Row);
                irrigRow.Apply(irrigateAmount, depth: 0);
                DaysSinceIrrigation = 0;
                if (IrrigateAlley)
                {
                   Irrigation irrigAlley = (Irrigation)Structure.Get("Irrigation", relativeTo: Alley);
                   irrigAlley.Apply(irrigateAmount , depth: 0);           
                }
            }
        }
    }
}
```
    Manager AutomaticFertiliser
      AllowFertiliser = yes
      Depth2SoilN = 1500
      CriticalSoilN = 30
      FertNAmount = 50
      FertType = UreaN
      FertApplicationDepth = 10
      FertMinimumDays = 15
```csharp
using APSIM.Core;
using System;
using Models.Core;
using Models.PMF;
using Models.Soils;
using APSIM.Shared.Utilities;
using System.Xml.Serialization;
using Models.Interfaces;
using Models.Soils.Nutrients;
using Newtonsoft.Json;

namespace Models
{
    [Serializable]
    public class Script : Model, IStructureDependency
    {
        [Link] private Clock Clock;
        [Link] private Fertiliser fertiliser;
        [Link] private ISummary summary;
        [Link] private Soil Soil;
        [Link(Type = LinkType.Scoped, ByName = true)] private Zone Row;
        private DateTime lastApplicationDate;
        private bool fertiliserIsAllowed;
        private int nLayers;
        [Link(ByName = true)]
        private ISolute NO3;
        [Link(ByName = true)]
        private ISolute NH4;
        [Link(ByName = true)]
        private ISolute Urea;
        [Link]
        private IPhysical soilPhysical;
        public IStructure Structure { private get; set; }

        //User inputs from properties tab
        [Description("Turn fertiliser applications on? ")]
        public yesnoType AllowFertiliser { get; set; }
        
        [Description("Depth to calculate available soil N (mm): ")]
        public double Depth2SoilN { get; set; }

        [Description("Minimum available N, triggers an application (kgN/ha): ")]
        public double CriticalSoilN { get; set; }

        [Description("Amount of N fertiliser for each application (kgN/ha): ")]
        public double FertNAmount { get; set; }

        [Description("Type of N fertiliser to apply: ")]
        [Display(Type = DisplayType.FertiliserType)]public string FertType { get; set; }

        [Description("Depth at which to apply the fertiliser (mm): ")]
        public double FertApplicationDepth { get; set; }
       
        [Description("Minimum period between applications (days): ")]
        public double FertMinimumDays { get; set; }
       
        public enum yesnoType
        {
            /// <summary>a positive answer</summary>
            yes,
            /// <summary>a negative answer</summary>
            no
        }

        [JsonIgnore] public double TopMineralN { get; set; }
        private bool CropIsActive { get; set; }
        


        

        [EventSubscribe("StartOfSimulation")]
        private void OnStartOfSimulation(object sender, EventArgs e)
        {
            fertiliserIsAllowed = (AllowFertiliser == yesnoType.yes);
            nLayers = soilPhysical.Thickness.Length;
        }

        [EventSubscribe("DoManagement")]
        private void OnDoManagement(object sender, EventArgs e)
        {
            double daysSinceLastApplication = (Clock.Today - lastApplicationDate).TotalDays;
            
            //Is the row crop actively growing?
            CropIsActive = false;
            double StageCode = (double)Structure.Get("Apple.Phenology.Stage", relativeTo: Row);
            if ((StageCode > 3.0) && (StageCode<5.0))
            {
                CropIsActive = true;
            }
            
            // get the N stored in the soil
            double depthFromSurface = 0.0;
            double fracLayer = 0.0;
            TopMineralN = 0.0;
            for (int layer = 0; layer < nLayers; layer++)
            {
                fracLayer = Math.Min(1.0, (Depth2SoilN - depthFromSurface) / soilPhysical.Thickness[layer]);
                TopMineralN += (NO3.kgha[layer]
                + NH4.kgha[layer]
                + Urea.kgha[layer])
                * fracLayer;
                depthFromSurface += soilPhysical.Thickness[layer];
                if (depthFromSurface >= Depth2SoilN)
                    layer = nLayers;
            }

            if (fertiliserIsAllowed && CropIsActive && (daysSinceLastApplication >= FertMinimumDays) && (TopMineralN <= CriticalSoilN))
            {
                fertiliser.Apply(FertNAmount, FertType, FertApplicationDepth);
                lastApplicationDate = Clock.Today;
            }
        }
    }
}
```
    ZoneAgregate
    Report ZoneAgregateReport: EventNames=[Clock].DoReport
      VariableNames:
        [Clock].Today
        [ZoneAgregate].SimulationArea
        [ZoneAgregate].Eop.Amount
        [ZoneAgregate].Eop.Pm2
        [ZoneAgregate].Eop.AmountByZone[1]
        [ZoneAgregate].Eop.AmountByZone[2]
        [ZoneAgregate].Ro.Amount
        [ZoneAgregate].Ro.Pm2
        [ZoneAgregate].Ro.AmountByZone[1]
        [ZoneAgregate].Ro.AmountByZone[2]
        [ZoneAgregate].Ri.Amount
        [ZoneAgregate].Ri.Pm2
        [ZoneAgregate].Ri.AmountByZone[1]
        [ZoneAgregate].Ri.AmountByZone[2]
        [ZoneAgregate].Et.Amount
        [ZoneAgregate].Et.Pm2
        [ZoneAgregate].Et.AmountByZone[1]
        [ZoneAgregate].Et.AmountByZone[2]
        [ZoneAgregate].AccumulatedIrrigation.Amount
        [ZoneAgregate].AccumulatedIrrigation.Pm2
        [ZoneAgregate].AccumulatedIrrigation.AmountByZone[1]
        [ZoneAgregate].AccumulatedIrrigation.AmountByZone[2]
        [ZoneAgregate].AccumulatedNitrogen.Amount
        [ZoneAgregate].AccumulatedNitrogen.Pm2
        [ZoneAgregate].AccumulatedNitrogen.AmountByZone[1]
        [ZoneAgregate].AccumulatedNitrogen.AmountByZone[2]
        [ZoneAgregate].FintTreeGreen
        [ZoneAgregate].FintTreeDead
        [ZoneAgregate].FintTreeTotal
        [ZoneAgregate].FintUnderstoryGreen
        [ZoneAgregate].FintUnderstoryDead
    RectangularZone Row: Length=100; Width=1.3; CanopyType=TreeRow; Slope=0; AspectAngle=0; Altitude=50
      Soil: Latitude=0; Longitude=0
        LayerStructure: Thickness=[200, 200, 200, 200, 200, 200, 300, 300, 400, 800]
        Chemical: PHUnits=Water
          Thickness  PH   CEC
          100        6.6  12.44
          200        6.2  11.6525
          300        5.7  11.045
          300        5.5  10.6625
          300        5.5  9.4025
          300        5.5  9.4025
          CEC source: Calculated
        Water: Thickness=[300, 300, 300, 300, 300, 300, 1200]; InitialValues=[0.42, 0.41, 0.5, 0.46, 0.45, 0.43, 0.43]; FilledFromTop=false
        WaterBalance SoilWater: SummerDate=1-Nov; SummerU=9; SummerCona=4.4; WinterDate=1-Apr; WinterU=9; WinterCona=4.4; DiffusConst=88; DiffusSlope=35.4; Salb=0.3; CN2Bare=68; CNRed=20; CNCov=0.8; DischargeWidth=0; CatchmentArea=0; PSIDul=-100
          Thickness  SWCON  KLAT
          300        0.55   0
          300        0.55   0
          300        0.55   0
          300        0.55   0
          300        0.1    0
          300        0.02   0
          400        0.02   0
          800        0      0
        Organic: FOMCNRatio=30; CarbonUnits=Total
          Thickness  Carbon  SoilCNRatio  FBiom  FInert  FOM
          100        1.82    11.5         0.025  0.3     1243.931
          200        1.47    11.5         0.025  0.4     833.832
          300        1.2     11.5         0.015  0.75    457.617
          300        1.03    11.5         0.01   0.9     251.145
          300        0.47    11.5         0.01   0.96    137.831
          300        0.47    11.5         0.01   0.96    75.644
        OutputLayers: Thickness=[300, 300, 300, 300, 300, 300]
        Solute NO3: Thickness=[100, 200, 300, 300, 300, 300]; InitialValues=[217, 15, 1.66667, 1.66667, 0, 0]; InitialValuesUnits=ppm; WaterTableConcentration=0; D0=0; DepthConstant=0; MaxDepthSoluteAccessible=0; RunoffEffectivenessAtMovingSolute=0; MaxEffectiveRunoff=0
        Solute NH4: Thickness=[100, 200, 300, 300, 300, 300]; InitialValues=[0, 0, 0, 0, 0, 0]; InitialValuesUnits=ppm; WaterTableConcentration=0; D0=0; DepthConstant=0; MaxDepthSoluteAccessible=0; RunoffEffectivenessAtMovingSolute=0; MaxEffectiveRunoff=0
        Solute Urea: Thickness=[100, 200, 300, 300, 300, 300]; InitialValues=[0, 0, 0, 0, 0, 0]; InitialValuesUnits=kg/ha; WaterTableConcentration=0; D0=0; DepthConstant=0; MaxDepthSoluteAccessible=0; RunoffEffectivenessAtMovingSolute=0; MaxEffectiveRunoff=0
        Physical
          Thickness  ParticleSizeSand  ParticleSizeSilt  ParticleSizeClay  Rocks     BD  AirDry  LL15  DUL   SAT   KS
          300        5                 65                30                0.136527  1   0.2     0.2   0.4   0.5   100
          300        5                 65                30                0.136527  1   0.2     0.2   0.4   0.5   100
          300        5                 65                30                0.136527  1   0.25    0.25  0.3   0.5   50
          300        5                 65                30                0.136527  1   0.2     0.2   0.3   0.5   40
          300        5                 65                30                0.136527  1   0.2     0.2   0.25  0.5   40
          300        5                 65                30                0         1   0.2     0.2   0.25  0.53  40
          1200       5                 65                30                0         1   0.2     0.2   0.25  0.53  40
          Rocks, ParticleSizeSand, ParticleSizeSilt, ParticleSizeClay source: Calculated
          SoilCrop AppleSoil: LL=[0.2, 0.2, 0.2, 0.2, 0.2, 0.2, 0.2]; KL=[1, 1, 1, 1, 1, 1, 1]; XF=[1, 1, 1, 1, 1, 1, 1]
          SoilCrop SPRUMSoil: LL=[0.2, 0.2, 0.2, 0.2, 0.2, 0.2, 0.2]; KL=[0.11, 0.11, 0.11, 0.11, 0.11, 0.11, 0.11]; XF=[1, 1, 1, 1, 1, 1, 1]
        Nutrient
        SoilTemperature Temperature
      SurfaceOrganicMatter: InitialResidueName=wheat_stubble; InitialResidueType=wheat; InitialResidueMass=500; InitialStandingFraction=0; InitialCPR=0; InitialCNR=100
      Fertiliser
      Irrigation
      Plant Apple
      Manager EstablishAppleTrees
        VarietyName = Sturmer
        RowSpacing = 6
        InterRowSpacing = 1
        AlleyZoneWidthFrac = 0.5
        AgeAtSimulationStart = 1
        YearsToMaxDimension = 7
        TrunkMassAtMaxDimension = 10
        GRINZ = True
        MaxRD = 3000
        CanopyBaseHeight = 1000
        MaxPrunedHeight = 3000
        MaxHeight = 3500
        MaxWidth = 3000
        MaxPrunedWidth = 2000
        SurfaceKL = 0.1
        Number = 10
```csharp
using APSIM.Core;
using APSIM.Numerics;
using APSIM.Shared.Utilities;
using Models.Climate;
using Models.Core;
using Models.Functions;
using Models.PMF;
using Models.PMF.Phen;
using Models.Soils;
using Newtonsoft.Json;
using System;
using System.Collections.Generic;
using System.Linq;

namespace Models
{
    [Serializable]
    public class Script : Model, IStructureDependency
{
    /// <summary>Structure instance supplied by APSIM.core.</summary>
    [field: NonSerialized]
    public IStructure Structure { private get; set; }

    private double _RowSpacing = 6;
    private double _InterRowSpacing = 1.0;
    private double _AlleyZoneWidthFrac = 0.5;
    private int _AgeAtSimulationStart = 1;
    private int _YearsToMaxDimension = 7;
    private double _TrunkMassAtmaxDimension = 10;
    private double _MaxRD = 3000;
    private double _CanopyBaseHeight = 1000;
    private double _MaxPrunedHeight = 3000;
    private double _MaxHeight = 3500;
    private double _MaxPrunedWidth = 2000;
    private double _MaxWidth = 3000;
    private double _ExtinctCoeff = 0.7;
    private double _MaxCover = 0.98;
    private double _surfaceKL = 0.1;
    private int _Number = 10;
    
    private string WinterSolsticeDate
    {
        get
        {
            DateTime winterSolsticeDate = DateUtilities.GetDate(weather.WinterSolsticeDOY, clock.Today.Year);
            return winterSolsticeDate.ToString("dd-MMM");
        }
    }
    
    [Display(Type = DisplayType.CultivarName)]
    [Description("Variety of tree in orchard")]
    public string VarietyName { get; set; }

    /// <summary>Distance between tree rows (0.01 - 100 m)</summary>
    [Separator("Orchid Information")]
    [Description("Distance between tree rows (0.01 - 100 m)")]
    [Units("m")]
    [Bounds(Lower = 0.01, Upper = 100)]
    public double RowSpacing
    {
        get { return _RowSpacing; }
        set { _RowSpacing = constrain(value, 0.01, 100); }
    }

    /// <summary>Distance between trees within rows (0.01 - 100 m)</summary>
    [Description("Distance between trees within rows (0.01 - 100 m)")]
    [Units("m")]
    [Bounds(Lower = 0.01, Upper = 100)]
    public double InterRowSpacing
    {
        get { return _InterRowSpacing; }
        set { _InterRowSpacing = constrain(value, 0.01, 100); }
    }

    /// <summary>Proportion of the row width taken up by alley zone(0-1)</summary>
    [Description("Relative Alley Zone Width (Proportion of the distance between trees taken up by alley zone(0-1))")]
    [Units("0-1")]
    [Bounds(Lower = 0, Upper = 1.0)]
    public double AlleyZoneWidthFrac
    {
        get { return _AlleyZoneWidthFrac; }
        set { _AlleyZoneWidthFrac = constrain(value, 0, 0.99); }
    }

    /// <summary>Width of the alley zone between tree rows (0-1)</summary>
    [Units("m")]
    public double AlleyZoneWidth
    {
        get
        {
            if ((AlleyZoneWidthFrac >= 1) || (AlleyZoneWidthFrac < 0))
                throw new Exception("Alley zone width fraction must be greater than zero and less than 1");
            return RowSpacing * AlleyZoneWidthFrac;
        }
    }

    /// <summary>Width of the zone trees are planted in (m)</summary>
    [Units("m")]
    public double RowZoneWidth
    {
        get
        {
            if (AlleyZoneWidth > RowSpacing)
                throw new Exception("Alley Zone Width can not exceed Row spacing");
            return RowSpacing * (1-AlleyZoneWidthFrac);
        }
    }

    /// <summary>Tree population density (/ha)</summary>
    [Units("/ha)")]
    public double TreePopulation
    {
        get
        {
            return 10000 / (RowSpacing * InterRowSpacing);
        }
    }

    /// <summary>
    /// The Area of the tree canopy at maximum width.  Assums canopy remains touching within rows
    /// </summary>
    [Units("m2")]
    public double TreeCanopyArea
    {
        get
        {
            return MaxWidth/1000 * InterRowSpacing;
        }
    }

    /// <summary>Tree Age At Start of Simulation (years)</summary>
    [Description("Tree Age At Start of Simulation (years)")]
    [Units("years")]
    [Bounds(Lower = 0, Upper = 300)]
    public double AgeAtSimulationStart
    {
        get { return _AgeAtSimulationStart; }
        set { _AgeAtSimulationStart = (int)constrain((double)value, 0, 300); }
    }

    /// <summary>Age of the tree when it reaches Maximum dimension (1-300 years)</summary>
    [Description("Age of the tree when it reaches Maximum dimension (1-300 years)")]
    [Units("years")]
    [Bounds(Lower = 1, Upper = 300)]
    public int YearsToMaxDimension
    {
        get { return _YearsToMaxDimension; }
        set { _YearsToMaxDimension = (int)constrain((double)value, 1, 300); }
    }

    /// <summary>Trunk dry mass when maximum dimension reached (0.1-10000 kgDM/tree)</summary>
    [Description("Trunk dry mass when maximum dimension reached (0.1-10000 kgDM/tree)")]
    [Units("kgDM/tree")]
    [Bounds(Lower = 0.1, Upper = 10000)]
    public double TrunkMassAtMaxDimension
    {
        get { return _TrunkMassAtmaxDimension; }
        set { _TrunkMassAtmaxDimension = constrain(value, 0.1, 10000); }
    }

    /// <summary>Grow roots into Alley zone (yes or no)</summary>
    [Separator("Tree Dimnesions")]
    [Description("Grow roots into Alley zone (yes or no)")]
    public bool GRINZ { get; set; }

    /// <summary>Root when mature (300 - 20000 mm)</summary>
    [Description("Root depth when mature (300 - 20000 mm)")]
    [Bounds(Lower = 300, Upper = 20000)]
    [Units("mm")]
    public double MaxRD
    {
        get { return _MaxRD; }
        set { _MaxRD = constrain(value, 300, 20000); }
    }

    /// <summary>Hight of the bottom of the canop (10-100000 mm)</summary>
    [Description("Hight of the bottom of the canopy (10-100000 mm)")]
    [Bounds(Lower = 10, Upper = 100000)]
    [Units("mm")]
    public double CanopyBaseHeight
    {
        get { return _CanopyBaseHeight; }
        set { _CanopyBaseHeight = constrain(value, 10, 100000); }
    }

    /// <summary>Hight of mature tree after pruning (50 - 200000mm)</summary>
    [Description("Hight of mature tree after pruning (50 - 200000mm)")]
    [Bounds(Lower = 50, Upper = 200000)]
    [Units("mm")]
    public double MaxPrunedHeight
    {
        get { return _MaxPrunedHeight; }
        set { _MaxPrunedHeight = constrain(value, 50, 200000); }
    }

    /// <summary>maximum hight of mature tree before pruning (10 - 200000mm)</summary>
    [Description("maximum hight of mature tree before pruning (mm)")]
    [Bounds(Lower = 10, Upper = 200000)]
    [Units("mm")]
    public double MaxHeight
    {
        get { return _MaxHeight; }
        set { _MaxHeight = constrain(value, 10, 200000); }
    }

    /// <summary>Width of mature tree before pruning (10-100000 mm)</summary>
    [Description("Width of mature tree before pruning (10-100000 mm)")]
    [Bounds(Lower = 10, Upper = 100000)]
    [Units("mm")]
    public double MaxWidth
    {
        get { return _MaxWidth; }
        set { _MaxWidth = constrain(value, 10, 100000); }
    }

    /// <summary>Width of mature tree after pruning (10-100000mm)</summary>
    [Description("Width of mature tree after pruning  (10-100000mm)")]
    [Bounds(Lower = 10, Upper = 100000)]
    [Units("mm")]
    public double MaxPrunedWidth
    {
        get { return _MaxPrunedWidth; }
        set { _MaxPrunedWidth = constrain(value, 10, 100000); }
    }
    
    /// <summary>KL in top soil layer (0.01 - 0.2)</summary>
    [Description("KL in top soil layer (0.01 - 0.2)")]
    [Bounds(Lower = 0.01, Upper = 0.2)]
    [Units("0-1")]
    public double SurfaceKL
    {
        get { return _surfaceKL; }
        set { _surfaceKL = constrain(value, 0.01, 0.2); }
    }

    /// <summary>Fruit number retained (per m2 tree canopy area)</summary>
    [Separator("Fruit parameters")]
    [Description("Fruit number retained (per m2 tree canopy area)")]
    [Bounds(Lower = 0, Upper = 1000000)]
    [Units("/m^2 canopy area")]
    public int Number
    {
        get { return _Number; }
        set { _Number = (int)constrain((double)value, 0, 1000000); }
    }

    /// <summary>The plant</summary>
    private Plant treeModel = null;

    private Phenology phenology = null;

    private Soil soil = null;

    [Link]
    private ISummary summary = null;

    private RootNetwork root = null;

    private Zone zone = null;

    [Link]
    private Weather weather = null;

    [Link]
    private Clock clock = null;

    /// <summary>The zones in the simulation/// </summary>
    //List<Zone> zones = null;

    [Link(Type = LinkType.Ancestor)]
    private Simulation simulation = null;

    /// <summary>The cultivar object representing the current instance of the SCRUM crop/// </summary>
    private Cultivar tree = null;

    /// <summary>Total daily solar radiation available per tree/// </summary>
    [Units("MJ per m tree")]
    [JsonIgnore]
    public double TotalSolarRadiation { get; set; }

    private bool hasAlleyZone = false;
    private bool hasRowZone = false;

    [JsonIgnore]
    private Dictionary<string, string> blankParams = new Dictionary<string, string>()
    {
        {"MaxRootDepth","[Apple].Root.Network.MaximumRootDepth.FixedValue = "},
        {"MaxPrunedHeight","[Apple].MaxPrunedHeight.FixedValue = " },
        {"CanopyBaseHeight","[Apple].Height.CanopyBaseHeight.Maximum.FixedValue = " },
        {"MaxSeasonalHeight","[Apple].Height.SeasonalGrowth.Maximum.FixedValue = " },
        {"MaxPrunedWidth","[Apple].Width.PrunedWidth.Maximum.FixedValue = "},
        {"MaxSeasonalWidth","[Apple].Width.SeasonalGrowth.Maximum.FixedValue = " },
        {"SurfaceKL","[Apple].Root.Network.KLModifier.SurfaceKL.FixedValue = " },
        {"InitialTrunkWt","[Apple].Trunk.InitialWt.FixedValue = "},
        {"InitialRootWt", "[Apple].Root.InitialWt.FixedValue = " },
        {"YearsToMaturity","[Apple].RelativeAnnualDimension.XYPairs.X[2] = " },
        {"TrunkWtAtMaturity","[Apple].Trunk.MatureWt.FixedValue = " },
        {"YearsToMaxRD","[Apple].Root.Network.RootFrontVelocity.RootGrowthDuration.YearsToMaxDepth.FixedValue = " },
        {"Number","[Apple].Fruit.Number.RetainedPostThinning.FixedValue = " },
        {"RowWidth","[Apple].RowWidth.FixedValue = " },
        {"InterRowSpacing","[Apple].InterRowSpacing.FixedValue = " }
    };


    /// <summary>
    /// Method that sets apple running
    /// </summary>
    public void Establish()
    {
        double soilDepthMax = 0;

        var soilCrop = Structure.FindChild<SoilCrop>(treeModel.Name + "Soil", relativeTo: soil, recurse: true);
        var physical = Structure.FindChild<Physical>("Physical", relativeTo: soil, recurse: true);
        if (soilCrop == null)
            throw new Exception($"Cannot find a soil crop parameterisation called {treeModel.Name}Soil");

        double[] xf = soilCrop.XF;

        // Limit root depth for impeded layers
        for (int i = 0; i < physical.Thickness.Length; i++)
        {
            if (xf[i] > 0)
                soilDepthMax += physical.Thickness[i];
            else
                break;
        }

        // Apple sets soil KL to 1 and uses the KL modifier to determine appropriate kl based on root depth
        for (int d = 0; d < soilCrop.KL.Length; d++)
            soilCrop.KL[d] = 1.0;


        double rootDepth = Math.Min(MaxRD, soilDepthMax);
        if (GRINZ)
        {  //Must add root zone prior to sowing the crop.  For some reason they (silently) dont add if you try to do so after the crop is established
            string neighbour = "";
            List<Zone> zones = Structure.FindChildren<Zone>(relativeTo: simulation).ToList();
            if (zones.Count > 2)
                throw new Exception("Strip crop logic only set up for 2 zones, your simulation has more than this");
            if (zones.Count > 1)
            {
                foreach (Zone z in zones)
                {
                    if (z.Name != zone.Name)
                        neighbour = z.Name;
                }
                root.ZoneNamesToGrowRootsIn.Add(neighbour);
                NutrientPoolFunctions InitialDM = new NutrientPoolFunctions();
                Constant InitStruct = new Constant();
                InitStruct.FixedValue = 10;
                InitialDM.Structural = InitStruct;
                Constant InitMetab = new Constant();
                InitMetab.FixedValue = 0;
                InitialDM.Metabolic = InitMetab;
                Constant InitStor = new Constant();
                InitStor.FixedValue = 0;
                InitialDM.Storage = InitStor;
            }
        }

        string cropName = this.Name;
        double depth = Math.Min(this.MaxRD * this.AgeAtSimulationStart / this.YearsToMaxDimension, rootDepth);
        double population = 1.0;
        double rowWidth = 0.0;

        tree = CoeffCalc();
        treeModel.AddCultivar(tree);
        treeModel.Sow(cropName, population, depth, rowWidth);
        phenology.SetAge(AgeAtSimulationStart);
        summary.WriteMessage(this,"Some of the message above is not relevent as Apple has no notion of population, bud number or row spacing." +
            " Additional info that may be useful.  " + this.Name + " is established as " + this.AgeAtSimulationStart.ToString() + " Year old plant "
            ,MessageType.Information);
    }

    /// <summary>
    /// Data structure that holds Apple parameter names and the cultivar overwrite they map to
    /// </summary>
    public Cultivar CoeffCalc()
    {
        Dictionary<string, string> treeParams = new Dictionary<string, string>(blankParams);

        treeParams["MaxRootDepth"] += MaxRD.ToString();
        treeParams["MaxPrunedHeight"] += MaxPrunedHeight.ToString();
        treeParams["CanopyBaseHeight"] += CanopyBaseHeight.ToString();
        treeParams["MaxSeasonalHeight"] += (MaxHeight - MaxPrunedHeight).ToString();
        treeParams["MaxPrunedWidth"] += MaxPrunedWidth.ToString();
        treeParams["MaxSeasonalWidth"] += (MaxWidth - MaxPrunedWidth).ToString();
        treeParams["SurfaceKL"] += SurfaceKL.ToString();
        treeParams["YearsToMaturity"] += YearsToMaxDimension.ToString();
        treeParams["TrunkWtAtMaturity"] += (TrunkMassAtMaxDimension * 1000).ToString();
        treeParams["YearsToMaxRD"] += YearsToMaxDimension.ToString();
        treeParams["Number"] += (Number*TreeCanopyArea).ToString();
        
        if (hasAlleyZone)
        {
            treeParams["RowWidth"] += (RowZoneWidth + AlleyZoneWidth).ToString();
            treeParams["InterRowSpacing"] += InterRowSpacing.ToString();
        }
        else
        {
            treeParams["RowWidth"] += RowZoneWidth.ToString();
            treeParams["InterRowSpacing"] += InterRowSpacing.ToString();
        }

        if (AgeAtSimulationStart <= 0)
            throw new Exception("Apple needs to have a 'Tree Age at start of Simulation' > 1 years");
        if (TrunkMassAtMaxDimension <= 0)
            throw new Exception("Apple needs to have a 'Trunk Mass at maximum dimension > 0");
        double relativeInitialSize = Math.Min(1,(double)AgeAtSimulationStart / (double)YearsToMaxDimension);
        double initialTrunkWt = relativeInitialSize* TrunkMassAtMaxDimension *1000;
        treeParams["InitialTrunkWt"] += initialTrunkWt.ToString();
        treeParams["InitialRootWt"] += (initialTrunkWt * 0.1).ToString();

        Cultivar variety = Structure.FindChild<Cultivar>(VarietyName,relativeTo:treeModel,recurse:true);
        string[] varietyOverwrites = variety.Command;
        for(int i=0; i<varietyOverwrites.Length; i++)
        {
            treeParams.Add(VarietyName + i.ToString(),varietyOverwrites[i]);
        }
        
        string[] commands = new string[treeParams.Count];
        treeParams.Values.CopyTo(commands, 0);

        Cultivar TreeValues = new Cultivar(this.Name, commands);
        
        return TreeValues;
    }

    private void SetUpZones()
    {
        List<Zone> zones = Structure.FindChildren<Zone>(relativeTo: simulation).ToList();
        foreach (Zone z in zones)
        {
            if (z.Name == "Row")
                hasRowZone = true;
            if (z.Name == "Alley")
                hasAlleyZone = true;
        }
        if (hasRowZone == false)
            throw new Exception("Strum tree instance must be in a zone named Row");

        if (hasAlleyZone != false)
        {
            if (AlleyZoneWidth == 0)
                throw new Exception("Alley Zone must have width > zero.  Either increase AlleyZoneWidthFrac to a positive value or remove alley zone is single zone simulation is required");
            Structure.Set("[Row].Width", (object)RowZoneWidth);
            Structure.Set("[Row].Length", (object)InterRowSpacing);
            Structure.Set("[Row].CanopyType", (object)"TreeRow");
            Structure.Set("[Alley].Width", (object)AlleyZoneWidth);
            Structure.Set("[Alley].Length", (object)InterRowSpacing);
            Structure.Set("[Alley].CanopyType", (object)"TreeRow");
        }
        else
        {
            Structure.Set("[Row].Width", (object)RowZoneWidth);
            Structure.Set("[Row].Length", (object)InterRowSpacing);
            Structure.Set("[Row].CanopyType", (object)"TreeRow");
        }
    }

    [EventSubscribe("StartOfSimulation")]
    private void OnStartSimulation(object sender, EventArgs e)
    {
        zone = Structure.FindParent<Zone>(recurse:true);
        treeModel = Structure.FindChild<Plant>(recurse:true,relativeTo:zone);
        phenology = Structure.FindChild<Phenology>(recurse:true,relativeTo:zone);
        soil = Structure.FindChild<Soil>(recurse:true,relativeTo:zone);
        root = Structure.FindChild<RootNetwork>(recurse:true,relativeTo:zone);
        SetUpZones();
        Establish();
    }



    private double constrain(double value, double min, double max)
    {
        if (value < min)
            throw new Exception(value.ToString() + " is lower than minimum allowed.  Enter a value greater than " + min.ToString());
        else if (value > max)
            throw new Exception(value.ToString() + " is higher than maximum allowed.  Enter a value less than " + max.ToString());
        else
        { }//Can we put something here to clear the status window so the error message goes away when a legit value is entered

        return MathUtilities.Bound(value, min, max);
    }






}
}
```
      BiomassRemovalEvents Pick: NameOfPlantToRemoveFrom=Apple; RemovalType=0; RemovalDates=[1-Nov]
        BiomassRemovalFractions:
          PlantName  OrganName  TypeString  LiveToRemove  DeadToRemove  LiveToResidue  DeadToResidue
          Apple      Root       Cutting     0             0             0              0
          Apple      Leaf       Cutting     0             0             0.05           0
          Apple      Trunk      Cutting     0             0             0.05           0
          Apple      Fruit      Cutting     0.85          0             0.05           0
      BiomassRemovalEvents Prune: NameOfPlantToRemoveFrom=Apple; RemovalType=3; RemovalDates=[1-Dec]
        BiomassRemovalFractions:
          PlantName  OrganName  TypeString  LiveToRemove  DeadToRemove  LiveToResidue  DeadToResidue
          Apple      Root       Pruning     0             0             0              0
          Apple      Leaf       Pruning     0             0             1              1
          Apple      Trunk      Pruning     0             0             0.15           0.9
          Apple      Fruit      Pruning     0             0             1              1
      Report RowZoneReport: EventNames=[Clock].DoReport
        VariableNames:
          [Clock].Today
          [Row].Area
          [Row].Apple.CanopyArea
          [Row].Apple.RootUptakesArbitrator.WaterDemand.Amount
          [Row].Apple.RootUptakesArbitrator.WaterDemand.mm
          [Row].Apple.RootUptakesArbitrator.NitrogenDemand.Amount
          [Row].Apple.Root.Network.WtByLayerZone1
          [Row].Apple.Root.Network.WtByLayerZone2
          [Row].Apple.Arbitrator.Carbon.TotalPlantDemand
          [Row].Apple.Arbitrator.Carbon.TotalPlantSupply
          [Row].Apple.Arbitrator.Carbon.TotalPlantDemandsAllocated
          [Row].Apple.Arbitrator.Fn
          [Row].Apple.Arbitrator.Nitrogen.TotalPlantDemand
          [Row].Apple.Arbitrator.Nitrogen.TotalPlantSupply
          [Row].Apple.Arbitrator.Nitrogen.TotalPlantDemandsAllocated
          [Row].Apple.Fruit.TotalCarbonDemand.RelativeFruitMass.Delta.Integral
          [Row].Apple.Fruit.Allocated.Carbon.Total
          [Row].Apple.Fruit.Allocated.Nitrogen.Total
          [Row].Apple.Fruit.Carbon.Demands.Structural
          [Row].Apple.Fruit.Carbon.Demands.Total
          [Row].Apple.Fruit.DMC
          [Row].Apple.Fruit.FreshWtPerFruit
          [Row].Apple.Fruit.N
          [Row].Apple.Fruit.Nitrogen.Demands.Total
          [Row].Apple.Fruit.Number
          [Row].Apple.Fruit.Diameter
          [Row].Apple.Fruit.VolumePerFruit
          [Row].Apple.Fruit.Wt
          [Row].Apple.Fruit.PotentialDWPerFruit
          [Row].Apple.Fruit.TotalCarbonDemand.RelativeFruitMass
          [Row].Apple.Fruit.TotalCarbonDemand.CarbonConc
          [Row].Apple.Height
          [Row].Apple.Height.CanopyBaseHeight
          [Row].Apple.Height.CanopyBaseHeight  + [Row].Apple.Height.PrunedCanopyDepth
          [Row].Apple.Height.CanopyBaseHeight  + [Row].Apple.Height.PrunedCanopyDepth + [Row].Apple.Height.SeasonalGrowth
          [Row].Apple.Leaf.Allocated.Carbon.Total
          [Row].Apple.Leaf.Allocated.Nitrogen.Total
          [Row].Apple.Leaf.Canopy.CoverGreen
          [Row].Apple.Leaf.Dead.Wt
          [Row].Apple.Leaf.Carbon.Demands.Structural
          [Row].Apple.Leaf.Carbon.Demands.Total
          [Row].Apple.Leaf.Fn
          [Row].Apple.Leaf.Canopy.Fw
          [Row].Apple.Leaf.Canopy.LAI
          [Row].Apple.Leaf.Live.Wt
          [Row].Apple.Leaf.N
          [Row].Apple.Leaf.Nitrogen.Demands.Total
          [Row].Apple.Leaf.Canopy.PotentialEP
          [Row].Apple.Leaf.Canopy.RadiationIntercepted
          [Row].Apple.Leaf.Senesced.Weight.Structural
          [Row].Apple.Leaf.SenescenceRate
          [Row].Apple.Leaf.Canopy.Transpiration
          [Row].Apple.Leaf.Canopy.WaterDemand
          [Row].Apple.Leaf.Canopy.WaterAllocation
          [Row].Apple.Leaf.Canopy.Width
          [Row].Apple.Leaf.Canopy.GreenExtinctionCoefficient
          [Row].Apple.Leaf.Wt
          [Row].Apple.Phenology.Age.YearDecimal
          [Row].Apple.Phenology.Age.Years
          [Row].Apple.Phenology.CurrentStageName
          [Row].Apple.Phenology.DaysSinceFlowering
          [Row].Apple.Phenology.Stage
          [Row].Apple.RelativeSeasonalDimension
          [Row].Apple.RelativeAnnualDimension
          [Row].Apple.Root.Allocated.Carbon.Total
          [Row].Apple.Root.Allocated.Nitrogen.Total
          [Row].Apple.Root.Network.Depth
          [Row].Apple.Root.Carbon.Demands.Structural
          [Row].Apple.Root.Carbon.Demands.Total
          [Row].Apple.Root.N
          [Row].Apple.Root.Nitrogen.Demands.Total
          [Row].Apple.RootUptakesArbitrator.WaterUptake.AmountByZone
          [Row].Apple.RootUptakesArbitrator.WaterUptake.Mm
          [Row].Apple.RootUptakesArbitrator.WaterUptake.Amount
          [Row].Apple.RootUptakesArbitrator.NitrogenUptake.AmountByZone
          [Row].Apple.RootUptakesArbitrator.NitrogenUptake.Gpm2
          [Row].Apple.RootUptakesArbitrator.NitrogenUptake.Amount
          [Row].Apple.RootUptakesArbitrator.WaterSupply.AmountByZone
          [Row].Apple.RootUptakesArbitrator.WaterSupply.Mm
          [Row].Apple.RootUptakesArbitrator.WaterSupply.Amount
          [Row].Apple.RootUptakesArbitrator.NitrogenSupply.AmountByZone
          [Row].Apple.RootUptakesArbitrator.NitrogenSupply.Gpm2
          [Row].Apple.RootUptakesArbitrator.NitrogenSupply.Amount
          [Row].Apple.Root.Wt
          [Row].Apple.TranspirationPerTree
          [Row].Apple.Trunk.Allocated.Carbon.Total
          [Row].Apple.Trunk.Allocated.Nitrogen.Total
          [Row].Apple.Trunk.Carbon.Demands.Structural
          [Row].Apple.Trunk.Carbon.Demands.Total
          [Row].Apple.Trunk.EnergyBalance.CoverTotal
          [Row].Apple.Trunk.EnergyBalance.DeadAreaIndex
          [Row].Apple.Trunk.EnergyBalance.LAIDead
          [Row].Apple.Trunk.EnergyBalance.RadiationInterceptedByDead
          [Row].Apple.Trunk.EnergyBalance.Transpiration
          [Row].Apple.Trunk.N
          [Row].Apple.Trunk.Nitrogen.Demands.Total
          [Row].Apple.Trunk.Wt
          [Row].Apple.Width
          [Row].Apple.Width.PrunedWidth
          [Row].Apple.Width.PrunedWidth + [Row].Apple.Width.SeasonalGrowth
          [Row].Apple.TranspirationPerLeafArea
          [Row].SurfaceOrganicMatter.N
          [Row].SurfaceOrganicMatter.Wt
          [Row].Irrigation.IrrigationApplied
          [Row].Fertiliser.NitrogenApplied
          sum([Row].Soil.OutputLayers.SWmm)
          ([Row].Soil.OutputLayers.SWmm[1] + [Row].Soil.OutputLayers.SWmm[1] + [Row].Soil.OutputLayers.SWmm[1]) as SWmm90
          [Row].Soil.OutputLayers.SW
          [Row].Soil.OutputLayers.SAT
          [Row].Soil.OutputLayers.DUL
          [Row].Soil.OutputLayers.LL15
          [Row].Soil.SoilWater.Evaporation
          [Row].Soil.SoilWater.Eo
          [Weather].PanEvap
          [Weather].Radn
          [Weather].Rain
    RectangularZone Alley: Length=100; Width=2.2; CanopyType=TreeRow; Slope=0; AspectAngle=0; Altitude=50
      Report AlleyZoneReport: EventNames=[Clock].DoReport
        VariableNames:
          [Clock].Today
          [Alley].Area
          [Alley].SPRUM.RootUptakesArbitrator.WaterDemand.Amount
          [Alley].SPRUM.RootUptakesArbitrator.WaterSupply.Amount
          [Alley].SPRUM.RootUptakesArbitrator.WaterUptake.Amount
          [Alley].SPRUM.RootUptakesArbitrator.NitrogenDemand.Amount
          [Alley].SPRUM.RootUptakesArbitrator.NitrogenSupply.Amount
          [Alley].SPRUM.RootUptakesArbitrator.NitrogenUptake.Amount
          [Alley].SPRUM.Root.Network.WtByLayerZone1
          [Alley].SPRUM.Root.Network.WtByLayerZone2
          [Alley].SPRUM.Arbitrator.Carbon.TotalPlantDemand
          [Alley].SPRUM.Arbitrator.Carbon.TotalPlantSupply
          [Alley].SPRUM.Arbitrator.Carbon.TotalPlantDemandsAllocated
          [Alley].SPRUM.Arbitrator.Fn
          [Alley].SPRUM.Arbitrator.Nitrogen.TotalPlantDemand
          [Alley].SPRUM.Arbitrator.Nitrogen.TotalPlantSupply
          [Alley].SPRUM.Arbitrator.Nitrogen.TotalPlantDemandsAllocated
          [Alley].SPRUM.Height
          [Alley].SPRUM.Leaf.Allocated.Carbon.Total
          [Alley].SPRUM.Leaf.Allocated.Nitrogen.Total
          [Alley].SPRUM.Leaf.Canopy.CoverGreen
          [Alley].SPRUM.Leaf.Dead.Wt
          [Alley].SPRUM.Leaf.Carbon.Demands.Structural
          [Alley].SPRUM.Leaf.Carbon.Demands.Total
          [Alley].SPRUM.Leaf.Fn
          [Alley].SPRUM.Leaf.Canopy.Fw
          [Alley].SPRUM.Leaf.Canopy.LAI
          [Alley].SPRUM.Leaf.Live.Wt
          [Alley].SPRUM.Leaf.N
          [Alley].SPRUM.Leaf.Nitrogen.Demands.Total
          [Alley].SPRUM.Leaf.Canopy.PotentialEP
          [Alley].SPRUM.Leaf.Canopy.RadiationIntercepted
          [Alley].SPRUM.Leaf.Senesced.Weight.Structural
          [Alley].SPRUM.Leaf.SenescenceRate
          [Alley].SPRUM.Leaf.Canopy.Transpiration
          [Alley].SPRUM.Leaf.Canopy.WaterDemand
          [Alley].SPRUM.Leaf.Canopy.WaterAllocation
          [Alley].SPRUM.Leaf.Canopy.Width
          [Alley].SPRUM.Leaf.Wt
          [Alley].SPRUM.Phenology.Age.YearDecimal
          [Alley].SPRUM.Phenology.Age.Years
          [Alley].SPRUM.Phenology.CurrentStageName
          [Alley].SPRUM.Phenology.Stage
          [Alley].SPRUM.RelativeAnnualDimension
          [Alley].SPRUM.Root.Allocated.Carbon.Total
          [Alley].SPRUM.Root.Allocated.Nitrogen.Total
          [Alley].SPRUM.Root.Network.Depth
          [Alley].SPRUM.Root.Carbon.Demands.Structural
          [Alley].SPRUM.Root.Carbon.Demands.Total
          [Alley].SPRUM.Root.N
          [Alley].SPRUM.Root.Nitrogen.Demands.Total
          [Alley].SPRUM.RootUptakesArbitrator.WaterUptake.AmountByZone
          [Alley].SPRUM.RootUptakesArbitrator.WaterUptake.Mm
          [Alley].SPRUM.RootUptakesArbitrator.WaterUptake.Amount
          [Alley].SPRUM.RootUptakesArbitrator.NitrogenUptake.AmountByZone
          [Alley].SPRUM.RootUptakesArbitrator.NitrogenUptake.Gpm2
          [Alley].SPRUM.RootUptakesArbitrator.NitrogenUptake.Amount
          [Alley].SPRUM.RootUptakesArbitrator.WaterSupply.AmountByZone
          [Alley].SPRUM.RootUptakesArbitrator.WaterSupply.Mm
          [Alley].SPRUM.RootUptakesArbitrator.WaterSupply.Amount
          [Alley].SPRUM.RootUptakesArbitrator.NitrogenSupply.AmountByZone
          [Alley].SPRUM.RootUptakesArbitrator.NitrogenSupply.Gpm2
          [Alley].SPRUM.RootUptakesArbitrator.NitrogenSupply.Amount
          [Alley].SPRUM.Root.Wt
          [Alley].SPRUM.Residue.Allocated.Carbon.Total
          [Alley].SPRUM.Residue.Allocated.Nitrogen.Total
          [Alley].SPRUM.Residue.Carbon.Demands.Structural
          [Alley].SPRUM.Residue.Carbon.Demands.Total
          [Alley].SPRUM.Residue.N
          [Alley].SPRUM.Residue.Nitrogen.Demands.Total
          [Alley].SPRUM.Residue.Wt
          [Alley].SurfaceOrganicMatter.N
          [Alley].SurfaceOrganicMatter.Wt
          [Alley].Irrigation.IrrigationApplied
          [Alley].Fertiliser.NitrogenApplied
          sum([Alley].Soil.OutputLayers.SWmm)
          ([Alley].Soil.OutputLayers.SWmm[1] + [Alley].Soil.OutputLayers.SWmm[1] + [Alley].Soil.OutputLayers.SWmm[1]) as SWmm90
          [Alley].Soil.OutputLayers.SW
          [Alley].Soil.OutputLayers.SAT
          [Alley].Soil.OutputLayers.DUL
          [Alley].Soil.OutputLayers.LL15
          [Alley].Soil.SoilWater.Drainage
          [Alley].Soil.SoilWater.Evaporation
          [Alley].Soil.SoilWater.Eo
          [Weather].PanEvap
          [Weather].Radn
          [Weather].Rain
      Soil: Latitude=0; Longitude=0
        LayerStructure: Thickness=[200, 200, 200, 200, 200, 200, 300, 300, 400, 800]
        Chemical: same as TestApple.Row.Soil.Chemical
        Water: Thickness=[300, 300, 300, 300, 300, 300, 1200]; InitialValues=[0.4, 0.4, 0.4, 0.46, 0.45, 0.43, 0.43]; FilledFromTop=false
        WaterBalance SoilWater: same as TestApple.Row.Soil.SoilWater
        Organic: FOMCNRatio=30; CarbonUnits=Total
          Thickness  Carbon  SoilCNRatio  FBiom  FInert  FOM
          100        1.82    11.5         0.025  0.3     1243.93
          200        1.47    11.5         0.025  0.4     833.832
          300        1.2     11.5         0.015  0.75    457.617
          300        1.03    11.5         0.01   0.9     251.145
          300        0.47    11.5         0.01   0.96    137.831
          300        0.47    11.5         0.01   0.96    75.6435
        OutputLayers: Thickness=[300, 300, 300, 300, 300, 300]
        Solute NO3: same as TestApple.Row.Soil.NO3
        Solute NH4: same as TestApple.Row.Soil.NH4
        Solute Urea: same as TestApple.Row.Soil.Urea
        Physical
          Thickness  ParticleSizeSand  ParticleSizeSilt  ParticleSizeClay  Rocks     BD  AirDry  LL15  DUL   SAT   KS
          300        5                 65                30                0.136527  1   0.2     0.2   0.4   0.5   100
          300        5                 65                30                0.136527  1   0.2     0.2   0.4   0.5   100
          300        5                 65                30                0.136527  1   0.25    0.25  0.3   0.5   50
          300        5                 65                30                0.136527  1   0.2     0.2   0.21  0.5   40
          300        5                 65                30                0.136527  1   0.2     0.2   0.21  0.5   40
          300        5                 65                30                0         1   0.2     0.2   0.21  0.53  40
          1200       5                 65                30                0         1   0.2     0.2   0.21  0.53  40
          Rocks, ParticleSizeSand, ParticleSizeSilt, ParticleSizeClay source: Calculated
          SoilCrop AppleSoil: LL=[0.2, 0.2, 0.2, 0.2, 0.2, 0.2, 0.2]; KL=[1, 1, 1, 1, 1, 1, 1]; XF=[1, 1, 1, 1, 1, 1, 1]
          SoilCrop SPRUMSoil: LL=[0.2, 0.2, 0.2, 0.2, 0.2, 0.2, 0.2]; KL=[0.11, 0.11, 0.11, 0.11, 0.11, 0.11, 0.11]; XF=[1, 1, 1, 1, 1, 1, 1]
        Nutrient
        SoilTemperature Temperature
      SurfaceOrganicMatter: InitialResidueName=wheat_stubble; InitialResidueType=wheat; InitialResidueMass=500; InitialStandingFraction=0; InitialCPR=0; InitialCNR=100
      Fertiliser
      Irrigation
      Plant SPRUM
      SprumPastureInstance UnderStoryPasture: AgeAtSimulationStart=0; YearsToMaxDimension=1; RUE=1; Presidue=0; RsenRate=0; Proot=0.1; PSBaseT=5; PSLOptT=20; PSUOptT=25; PSMaxT=30; GRINZ=true; MaxRD=600; MaxHeight=300; MaxPrunedHeight=100; MaxCover=0.97; MinCover=0.5; ExtinctCoeff=0.5; RegrowthDuration=300; FullCanopyDuration=0; BaseT=3; OptT=25; MaxT=35; RootNConc=0.01; LeafNConc=0.05; ResidueNConc=0.01; LegumePropn=0.2; GSMax=0.004; R50=150; SurfaceKL=0.1; WaterStress=true
      BiomassRemovalEvents Mow: NameOfPlantToRemoveFrom=SPRUM; RemovalType=0
        BiomassRemovalFractions:
          PlantName  OrganName  TypeString  LiveToRemove  DeadToRemove  LiveToResidue  DeadToResidue
          SPRUM      Residue    Cutting     0             0             0.5            0.5
          SPRUM      Leaf       Cutting     0             0             1              1
          SPRUM      Nodule     Cutting     0             0             0              0
          SPRUM      Root       Cutting     0             0             0              0
  Folder Replacements
    Plant Apple: PlantType=Apple
      Memo TitlePage
        Apple is a copy of Apple that we can add more detail to as we go
      BiomassArbitrator Arbitrator
        Memo
          The partitioning of biomass to fodder beet organs follows a "Relative Allocation" routine (see Arbitrator module documentation) guided by coefficients derived from the October sowing date data of the test dataset
        PlantNutrientsDelta Carbon
        PlantNutrientsDelta Nitrogen
      RootUptakesArbitrator
      DimensionsOverZones: PlantArea=0
      Phenology
        Constant ThermalTime: FixedValue=1; Units=days
        SubDailyInterpolation ChillingHours: agregationMethod=1
          XYPairs Response: X=[0, 7, 8, 20]; Y=[1, 1, 0, 0]
          HourlySinPpAdjusted InterpolationMethod
        GenericPhase ZeroPhase: Start=ModelInitialisation; End=Dormant; IsEmerged=false
          Memo
            It is necessary to have a phase before Dormancy otherwise the rewind doesn't work
          VariableReference Progression: VariableName=[Phenology].ThermalTime
          Constant Target: FixedValue=0; Units=oCd
        GenericPhase SpringDormancy: Start=Dormant; End=BudBreak; IsEmerged=true
          VariableReference Progression: VariableName=[Phenology].ChillingHours
          Constant Target: FixedValue=100; Units=Chill Hours
        DatePhase CanopyExpansion: Start=BudBreak; End=StartFullCanopy; IsEmerged=true; DateToProgress=1-Apr
        DatePhase FullCanopy: Start=StartFullCanopy; End=StartLeafFall; IsEmerged=true; DateToProgress=1-Jun
        DatePhase LeafFall: Start=StartLeafFall; End=BareTree; IsEmerged=true; DateToProgress=1-Sep
        DatePhase WinterDormancy: Start=BareTree; End=SpringDormant; IsEmerged=true; DateToProgress=1-Nov
        GotoPhase: Start=BareTree; IsEmerged=false; PhaseNameToGoto=SpringDormancy; RemovalType=5
        GenericPhase PlaceHolderPhase: Start=AlreadyGoneDormant; End=Eternity; IsEmerged=true
          Memo
            phase after dormancy so we can accumulate things after that
          VariableReference Progression: VariableName=[Phenology].ThermalTime
          Constant Target: FixedValue=1000; Units=oCd
        Age: AnniversaryOnWinterSolstice=false
        AddFunction AgeDecimal
          VariableReference AgeInt: VariableName=[Phenology].Age
          DivideFunction Decimal
            VariableReference DOY: VariableName=[Weather].DaysSinceWinterSolstice
            Constant DaysInAYear: FixedValue=365
        AccumulateFunctionGeneral DaysSinceFlowering: AccumulateToday=false; AccumulateEventName=[Clock].StartOfDay; StartDate=15-Apr; FractionRemovedOnStage=0; FractionRemovedOnEvent=0; ReduceDates=[15-Apr]; FractionRemovedOnDate=1
          Constant Day: FixedValue=1; Units=d
      Organ Root: Cconc=0.4; IsAboveGround=false
        Constant InitialWt: FixedValue=0.5; Units=g/tree
        Respiration
          Constant MaintenanceRespirationFunction: FixedValue=0; Units=0-1
          NutrientFunctions AssimilationCostFunctions
            Constant C: FixedValue=0; Units=0-1
            Constant N: FixedValue=0; Units=0-1
            Constant P: FixedValue=0; Units=0-1
            Constant K: FixedValue=0; Units=0-1
          NutrientFunctions MobilisationCostFunctions: same as Replacements.Apple.Root.Respiration.AssimilationCostFunctions
        MultiplyFunction SenescenceRate
          ExponentialFunction: A=0; B=1; C=1
            DivideFunction
              SubtractFunction
                SoilTemperatureDepthFunction: Depth=100
                Constant: FixedValue=20
              Constant: FixedValue=10
          Constant Coefficient: FixedValue=0.015
        Constant DetachmentRate: FixedValue=0.1; Units=/d
        OrganNutrientDelta Carbon: MaxCDelta=0
          OrganNutrientSupplies Supplies: Fixation=0; Uptake=0
            NutrientPoolsState ReAllocation
            NutrientPoolsState ReTranslocation
          NutrientDemandFunctions DemandFunctions
            PhaseLookupValue Structural: Start=BudBreak; End=BareTree
              VariableReference Structural: VariableName=[Apple].Root.TotalCarbonDemand
            Constant Metabolic: FixedValue=0
            Constant Storage: FixedValue=0
            Constant QStructuralPriority: FixedValue=1
            Constant QMetabolicPriority: FixedValue=0
            Constant QStoragePriority: FixedValue=0
          NutrientSupplyFunctions SupplyFunctions
            Constant Fixation: FixedValue=0
            Constant Uptake: FixedValue=0
            NutrientPoolFunctions ReAllocation
              Constant Structural: FixedValue=0
              Constant Metabolic: FixedValue=0
              Constant Storage: FixedValue=0
            NutrientPoolFunctions ReTranslocation: same as Replacements.Apple.Root.Carbon.SupplyFunctions.ReAllocation
          NutrientProportionFunctions PoolFractions
            Constant Structural: FixedValue=1
            Constant Metabolic: FixedValue=0
            Constant Storage: FixedValue=0
        OrganNutrientDelta Nitrogen: MaxCDelta=0
          OrganNutrientSupplies Supplies: Fixation=0; Uptake=0
            NutrientPoolsState ReAllocation
            NutrientPoolsState ReTranslocation
          NutrientDemandFunctions DemandFunctions
            DeficitDemandFunction Structural
            DeficitDemandFunction Storage
            DeficitDemandFunction Metabolic
            Constant QStructuralPriority: FixedValue=1
            Constant QMetabolicPriority: FixedValue=0
            Constant QStoragePriority: FixedValue=0
          NutrientSupplyFunctions SupplyFunctions: same as Replacements.Apple.Root.Carbon.SupplyFunctions
          NutrientConcentrationFunctions ConcFunctions
            Constant Maximum: FixedValue=0.02; Units=gN /gDM
              Memo Param value set at establishment
                Apple calculates this parameter value during run-time when the crop is established from parameter values set in the relevent Appletree object
            VariableReference Critical: VariableName=[Root].Nitrogen.ConcFunctions.Maximum
            VariableReference Minimum: VariableName=[Root].Nitrogen.ConcFunctions.Maximum
        RootNetwork Network
          RootShapeCylinder RootShape
          MultiplyFunction KLModifier
            KLModiferVsDepthFunction DepthReduction
              VariableReference LayerDepth: VariableName=[Physical].DepthMidPoints
              VariableReference MaximumRootDepth: VariableName=[Root].Network.MaximumRootDepth
            Constant SurfaceKL: FixedValue=0.1
          Constant SoilWaterEffect: FixedValue=1; Units=0-1
          Constant MaximumRootDepth: FixedValue=3000; Units=mm
          DivideFunction RootFrontVelocity
            VariableReference MaxRootDepth: VariableName=[Root].Network.MaximumRootDepth
            ProtectedDivideFunction RootGrowthDuration: NumeratorErrVal=0; DenominatorErrVal=0
              Constant YearsToMaxDepth: FixedValue=365
              Constant DaysInAYear: FixedValue=365
          Constant KNO3: FixedValue=0.02
          Constant KNH4: FixedValue=0
          LinearInterpolationFunction NUptakeSWFactor
            XYPairs: X=[0, 1]; Y=[0, 1]
            VariableReference XValue: VariableName=[Root].Network.RWC
          Constant SpecificRootLength: FixedValue=105; Units=m/g
          Constant RootDepthStressFactor: FixedValue=1
          Constant MaxDailyNUptake: FixedValue=10; Units=kg/ha
        MultiplyFunction TotalCarbonDemand
          MultiplyFunction TotalDMDemand
            VariableReference PotentialPhotosynthesis: VariableName=[Leaf].Photosynthesis
            Constant PartitionFraction: FixedValue=0.15
          VariableReference CarbonConc: VariableName=[Root].Cconc
        BiomassRemoval BiomassRemovalDefaults: HarvestFractionLiveToRemove=0; HarvestFractionDeadToRemove=0; HarvestFractionLiveToResidue=0; HarvestFractionDeadToResidue=0
      Organ Leaf: Cconc=0.4; IsAboveGround=true
        Constant InitialWt: FixedValue=0; Units=g/tree
        Respiration: same as Replacements.Apple.Root.Respiration
        PhaseLookup SenescenceRate
          PhaseLookupValue LeafFall: Start=StartLeafFall; End=BareTree
            MultiplyFunction
              Constant Switch: FixedValue=1
              ProtectedDivideFunction: NumeratorErrVal=0; DenominatorErrVal=0
                BoundFunction LAIReduction
                  Constant Upper: FixedValue=10000; Units=0-1
                  Constant Lower: FixedValue=0; Units=0-1
                  MultiplyFunction LeafAreaLoss
                    DeltaFunction DeltaLeafArea
                      VariableReference Integral: VariableName=[Apple].Leaf.Canopy.GreenAreaIndex
                    Constant Inverter: FixedValue=-1; Units=0-1
                HoldFunction LAIatStartLeafFall: WhenToHold=StartLeafFall
                  VariableReference LAI: VariableName=[Leaf].Canopy.GreenAreaIndex
        Constant DetachmentRate: FixedValue=0.05; Units=/d
        OrganNutrientDelta Carbon: MaxCDelta=0
          OrganNutrientSupplies Supplies: Fixation=0; Uptake=0
            NutrientPoolsState ReAllocation
            NutrientPoolsState ReTranslocation
          NutrientDemandFunctions DemandFunctions
            PhaseLookupValue Structural: Start=BudBreak; End=BareTree
              VariableReference Structural: VariableName=[Apple].Leaf.TotalCarbonDemand
            Constant Metabolic: FixedValue=0
            PhaseLookupValue Storage: Start=BudBreak; End=StartLeafFall
              Constant Metabolic: FixedValue=0
            Constant QStructuralPriority: FixedValue=1
            Constant QMetabolicPriority: FixedValue=0
            Constant QStoragePriority: FixedValue=0
          NutrientSupplyFunctions SupplyFunctions
            MultiplyFunction Fixation
              VariableReference Fixation: VariableName=[Leaf].Photosynthesis
              VariableReference Cconc: VariableName=[Leaf].Cconc
            Constant Uptake: FixedValue=0
            NutrientPoolFunctions ReAllocation: same as Replacements.Apple.Root.Carbon.SupplyFunctions.ReAllocation
            NutrientPoolFunctions ReTranslocation
              Constant Structural: FixedValue=0
              Constant Metabolic: FixedValue=0
              MultiplyFunction Storage
                VariableReference Storage: VariableName=[Leaf].Live.Carbon.Storage
                Constant Fraction: FixedValue=0
          NutrientProportionFunctions PoolFractions: same as Replacements.Apple.Root.Carbon.PoolFractions
        OrganNutrientDelta Nitrogen: MaxCDelta=0
          OrganNutrientSupplies Supplies: Fixation=0; Uptake=0
            NutrientPoolsState ReAllocation
            NutrientPoolsState ReTranslocation
          NutrientDemandFunctions DemandFunctions
            DeficitDemandFunction Structural
            DeficitDemandFunction Metabolic
            DeficitDemandFunction Storage
            Constant QStructuralPriority: FixedValue=1
            Constant QMetabolicPriority: FixedValue=0
            Constant QStoragePriority: FixedValue=0
          NutrientSupplyFunctions SupplyFunctions: same as Replacements.Apple.Root.Carbon.SupplyFunctions
          NutrientConcentrationFunctions ConcFunctions
            Constant Maximum: FixedValue=0
              Memo Param value set at establishment
                Apple calculates this parameter value during run-time when the crop is established from parameter values set in the relevent Appletree object
            VariableReference Critical: VariableName=[Leaf].Nitrogen.ConcFunctions.Maximum
            VariableReference Minimum: VariableName=[Leaf].Nitrogen.ConcFunctions.Maximum
        EnergyBalance Canopy: Albedo=0.18; Gsmax350=0.006; R50=100; KDead=0; LAIDead=0
          MinimumFunction FRGRer
            LinearInterpolationFunction NResponse
              XYPairs: X=[0, 0.8, 0.9, 1]; Y=[1, 1, 1, 1]
              VariableReference XValue: VariableName=[Leaf].Fn
            WeightedTemperatureFunction FT: MaximumTemperatureWeighting=0.75
              XYPairs: X=[5, 20, 25, 40]; Y=[1, 1, 1, 0]
          StomatalConductanceCO2Modifier
            VariableReference PhotosynthesisCO2Modifier: VariableName=[Leaf].Photosynthesis.FCO2
          VariableReference Tallness: VariableName=[Apple].Height
          SubtractFunction Deepness
            VariableReference Tallness: VariableName=[Apple].Height
            VariableReference CanopyBase: VariableName=[Apple].Height.CanopyBaseHeight
          Constant DeadAreaIndex: FixedValue=0; Units=m^2/m^2
          MultiplyFunction GreenAreaIndex
            Constant MaxGAI: FixedValue=5; Units=m2/m2
            LinearInterpolationFunction RelativeSeasonalDimension
              XYPairs: X=[3, 4, 5, 6]; Y=[0, 0.95, 1, 0]
              VariableReference XValue: VariableName=[Phenology].Stage
            Constant FrostFactor: FixedValue=1
          MultiplyFunction GreenExtinctionCoefficient
            Constant UnstressedCoeff: FixedValue=0.7
              Memo Param value set at establishment
                SCRUM calculates this parameter value during run-time when the crop is established from parameter values set in the relevent SCRUMcrop and SCRUMmanagement objects
            LinearInterpolationFunction WaterStressFactor
              XYPairs: X=[0, 0.7, 1]; Y=[0.1, 1, 1]
              VariableReference XValue: VariableName=[Leaf].Canopy.Fw
          Constant DeadExtinctionCoefficient: FixedValue=0
          VariableReference Wideness: VariableName=[Apple].Width
        RUEModel Photosynthesis
          Constant RUE: FixedValue=1.2
          Constant FVPD: FixedValue=1
          LinearInterpolationFunction Fw
            XYPairs: X=[0.05, 0.5, 1]; Y=[0, 0.2, 1]
            VariableReference XValue: VariableName=[Leaf].Canopy.Fw
          WeightedTemperatureFunction FT: MaximumTemperatureWeighting=0.75
            XYPairs: X=[5, 20, 25, 35]; Y=[0, 1, 1, 0]
          RUECO2Function FCO2: PhotosyntheticPathway=C3
          VariableReference RadnInt: VariableName=[Leaf].Canopy.RadiationIntercepted
          Constant FN: FixedValue=1
        MultiplyFunction TotalCarbonDemand
          MultiplyFunction TotalDMDemand
            VariableReference PotentialPhotosynthesis: VariableName=[Leaf].Photosynthesis
            Constant PartitionFraction: FixedValue=0.3
          VariableReference CarbonConc: VariableName=[Leaf].Cconc
        Constant SpecificArea: FixedValue=0.015; Units=m<sup>2</sup>/g
        BiomassRemoval BiomassRemovalDefaults: HarvestFractionLiveToRemove=0; HarvestFractionDeadToRemove=0; HarvestFractionLiveToResidue=0; HarvestFractionDeadToResidue=0
      Organ Trunk: Cconc=0.4; IsAboveGround=true
        Constant InitialWt: FixedValue=1; Units=g/tree
        Constant MatureWt: FixedValue=12000; Units=g/tree
        Respiration: same as Replacements.Apple.Root.Respiration
        Constant SenescenceRate: FixedValue=0; Units=/d
        Constant DetachmentRate: FixedValue=0; Units=/d
        OrganNutrientDelta Carbon: MaxCDelta=0
          OrganNutrientSupplies Supplies: Fixation=0; Uptake=0
            NutrientPoolsState ReAllocation
            NutrientPoolsState ReTranslocation
          NutrientDemandFunctions DemandFunctions
            VariableReference Structural: VariableName=[Apple].Trunk.TotalCarbonDemand
            Constant Metabolic: FixedValue=0
            Constant Storage: FixedValue=0
            Constant QStructuralPriority: FixedValue=1
            Constant QMetabolicPriority: FixedValue=0
            Constant QStoragePriority: FixedValue=0
          NutrientSupplyFunctions SupplyFunctions: same as Replacements.Apple.Root.Carbon.SupplyFunctions
          NutrientProportionFunctions PoolFractions: same as Replacements.Apple.Root.Carbon.PoolFractions
        OrganNutrientDelta Nitrogen: MaxCDelta=0
          OrganNutrientSupplies Supplies: Fixation=0; Uptake=0
            NutrientPoolsState ReAllocation
            NutrientPoolsState ReTranslocation
          NutrientDemandFunctions DemandFunctions: same as Replacements.Apple.Leaf.Nitrogen.DemandFunctions
          NutrientSupplyFunctions SupplyFunctions: same as Replacements.Apple.Root.Carbon.SupplyFunctions
          NutrientConcentrationFunctions ConcFunctions
            Constant Maximum: FixedValue=0
              Memo Param value set at establishment
                Apple calculates this parameter value during run-time when the crop is established from parameter values set in the relevent Appletree object
            VariableReference Critical: VariableName=[Trunk].Nitrogen.ConcFunctions.Maximum
            VariableReference Minimum: VariableName=[Trunk].Nitrogen.ConcFunctions.Maximum
        BiomassRemoval BiomassRemovalDefaults: HarvestFractionLiveToRemove=0; HarvestFractionDeadToRemove=0; HarvestFractionLiveToResidue=1; HarvestFractionDeadToResidue=1
        MultiplyFunction TotalCarbonDemand
          MinimumFunction TotalDMDemand
            MultiplyFunction Available
              VariableReference PotentialPhotosynthesis: VariableName=[Leaf].Photosynthesis
              Constant PartitionFraction: FixedValue=0.3
            MultiplyFunction SizeDemand
              Constant Rate: FixedValue=0.02
              SubtractFunction TotalDemand
                MultiplyFunction TargetWt
                  VariableReference AgePattern: VariableName=[Apple].RelativeAnnualDimension
                  VariableReference MatureWt: VariableName=[Trunk].MatureWt
                VariableReference CurrentWt: VariableName=[Trunk].Wt
          VariableReference CarbonConc: VariableName=[Leaf].Cconc
        EnergyBalance: Albedo=0.1; Gsmax350=0; R50=0; KDead=0; LAIDead=0
          Constant FRGRer: FixedValue=0
          Constant StomatalConductanceCO2Modifier: FixedValue=1
          VariableReference Tallness: VariableName=[Apple].Height
          VariableReference Deepness: VariableName=[Apple].Height
          Constant GreenAreaIndex: FixedValue=0
          Constant GreenExtinctionCoefficient: FixedValue=0
          Constant DeadAreaIndex: FixedValue=1
          Constant DeadExtinctionCoefficient: FixedValue=0.3
          VariableReference Wideness: VariableName=[Apple].Width
      Organ Fruit: Cconc=0.4; IsAboveGround=true
        Respiration: same as Replacements.Apple.Root.Respiration
        OrganNutrientDelta Carbon: MaxCDelta=0
          OrganNutrientSupplies Supplies: Fixation=0; Uptake=0
            NutrientPoolsState ReAllocation
            NutrientPoolsState ReTranslocation
          NutrientDemandFunctions DemandFunctions
            VariableReference Structural: VariableName=[Apple]Fruit.TotalCarbonDemand
            Constant Metabolic: FixedValue=0
            Constant Storage: FixedValue=0
            Constant QStructuralPriority: FixedValue=10000
            Constant QMetabolicPriority: FixedValue=0
            Constant QStoragePriority: FixedValue=0
          NutrientSupplyFunctions SupplyFunctions: same as Replacements.Apple.Root.Carbon.SupplyFunctions
          NutrientProportionFunctions PoolFractions: same as Replacements.Apple.Root.Carbon.PoolFractions
        OrganNutrientDelta Nitrogen: MaxCDelta=0
          OrganNutrientSupplies Supplies: Fixation=0; Uptake=0
            NutrientPoolsState ReAllocation
            NutrientPoolsState ReTranslocation
          NutrientDemandFunctions DemandFunctions
            DeficitDemandFunction Structural
            DeficitDemandFunction Metabolic
            DeficitDemandFunction Storage
            Constant QStructuralPriority: FixedValue=10000
            Constant QMetabolicPriority: FixedValue=0
            Constant QStoragePriority: FixedValue=0
          NutrientSupplyFunctions SupplyFunctions: same as Replacements.Apple.Root.Carbon.SupplyFunctions
          NutrientConcentrationFunctions ConcFunctions
            Constant Maximum: FixedValue=0
              Memo Param value set at establishment
                Apple calculates this parameter value during run-time when the crop is established from parameter values set in the relevent Appletree object
            VariableReference Critical: VariableName=[Fruit].Nitrogen.ConcFunctions.Maximum
            VariableReference Minimum: VariableName=[Fruit].Nitrogen.ConcFunctions.Maximum
        BiomassRemoval BiomassRemovalDefaults: HarvestFractionLiveToRemove=0.8; HarvestFractionDeadToRemove=0; HarvestFractionLiveToResidue=0.2; HarvestFractionDeadToResidue=1
        MultiplyFunction TotalCarbonDemand
          MaximumFunction RelativeFruitMass
            DeltaFunction Delta
              LinearInterpolationFunction Integral
                XYPairs: X=[0, 20, 150, 200]; Y=[0, 0.01, 0.9, 1]
                  Memo
                    The x values that define the shape of the fruit biomass demand are set at establishment from values defined in AppleTreeInstance
                VariableReference XValue: VariableName=[Apple].Phenology.DaysSinceFlowering
            Constant Zero: FixedValue=0
          VariableReference Number: VariableName=[Fruit].Number
          VariableReference PotentialDW: VariableName=[Fruit].PotentialDWPerFruit
          VariableReference CarbonConc: VariableName=[Fruit].Cconc
        Constant SenescenceRate: FixedValue=0; Units=/d
        Constant DetachmentRate: FixedValue=0; Units=/d
        Constant Density: FixedValue=0.75; Units=g/cm3
        Constant DMC: FixedValue=0.2; Units=g/g
        MultiplyFunction FreshWt
          DivideFunction FreshWtConversion
            Constant: FixedValue=1
            VariableReference DMconc: VariableName=[Fruit].DMC
          VariableReference DryWt: VariableName=[Fruit].Wt
        MultiplyFunction Number
          Constant RetainedPostThinning: FixedValue=50; Units=fruit/m^2 Canopy Area
          VariableReference RelativeAnnualDimension: VariableName=[Apple].RelativeAnnualDimension
        DivideFunction FreshWtPerFruit
          VariableReference FreshWt: VariableName=[Fruit].FreshWt
          VariableReference Number: VariableName=[Fruit].Number
        DivideFunction VolumePerFruit
          VariableReference FreshWtPerFruit: VariableName=[Fruit].FreshWtPerFruit
          VariableReference Density: VariableName=[Fruit].Density
        ExpressionFunction Diameter: Units=cm; Expression=(6*[Fruit].VolumePerFruit/3.1415926)^(1/3)
        Constant PotentialFWPerFruit: FixedValue=175; Units=g Fresh Wt
        MultiplyFunction PotentialDWPerFruit
          VariableReference PotentialFWPerFruit: VariableName=[Fruit].PotentialFWPerFruit
          VariableReference DMC: VariableName=[Fruit].DMC
        Constant InitialWt: FixedValue=0; Units=g/tree
        MultiplyFunction FreshYield_kgPerHa
          ProtectedDivideFunction Yield_gPerM2: NumeratorErrVal=0; DenominatorErrVal=0
            VariableReference FreshYeildPerTree: VariableName=[Apple].Fruit.FreshWt
            VariableReference CanopyArea: VariableName=[Apple].CanopyArea
          Constant GPerm2TokgPerHa: FixedValue=10; Units=m/ha
      AddFunction Height
        MultiplyFunction CanopyBaseHeight
          Constant Maximum: FixedValue=1000; Units=mm
          VariableReference Age pattern: VariableName=[Apple].RelativeAnnualDimension
        MultiplyFunction PrunedCanopyDepth
          SubtractFunction Maximum
            VariableReference MaxPrunedHeight: VariableName=[Apple].MaxPrunedHeight
            VariableReference MaxBaseHeight: VariableName=[Apple].Height.CanopyBaseHeight.Maximum
          VariableReference Age pattern: VariableName=[Apple].RelativeAnnualDimension
        MultiplyFunction SeasonalGrowth
          VariableReference Seasonal pattern: VariableName=[Apple].RelativeSeasonalDimension
          Constant Maximum: FixedValue=1000; Units=mm
          VariableReference Age pattern: VariableName=[Apple].RelativeAnnualDimension
      AddFunction Width
        MultiplyFunction PrunedWidth
          VariableReference Age pattern: VariableName=[Apple].RelativeAnnualDimension
          Constant Maximum: FixedValue=500; Units=mm
        MultiplyFunction SeasonalGrowth
          VariableReference Seasonal pattern: VariableName=[Apple].RelativeSeasonalDimension
          Constant Maximum: FixedValue=500; Units=mm
      LinearInterpolationFunction RelativeAnnualDimension
        XYPairs: X=[0, 6]; Y=[0.3, 1]
        VariableReference XValue: VariableName=[Phenology].Age.Years
      LinearInterpolationFunction RelativeSeasonalDimension
        XYPairs: X=[3, 4, 5]; Y=[0, 0.6, 1]
        VariableReference XValue: VariableName=[Phenology].Stage
      CompositeStates AboveGround
        Propertys=[[Leaf].Live, [Leaf].Dead, [Fruit].Live, [Fruit].Dead, [Trunk].Live, [Trunk].Dead]
      CompositeStates AboveGroundDead: Propertys=[[Leaf].Dead, [Fruit].Dead, [Trunk].Dead]
      CompositeStates BelowGround: Propertys=[[Root].Live, [Root].Dead]
      CompositeStates Total
        Propertys=[[Leaf].Live, [Leaf].Dead, [Fruit].Live, [Fruit].Dead, [Trunk].Live, [Trunk].Dead, [Root].Live, [Root].Dead]
      CompositeStates TotalLive: Propertys=[[Leaf].Live, [Fruit].Live, [Trunk].Live, [Root].Live]
      CompositeStates TotalDead: Propertys=[[Leaf].Dead, [Fruit].Dead, [Trunk].Dead, [Root].Dead]
      Constant SeedMortalityRate: FixedValue=0
      Constant MaxPrunedHeight: FixedValue=3000; Units=mm
      Constant MortalityRate: FixedValue=0
      AddFunction RadiationIntercepted
        VariableReference LeafInterception: VariableName=[Apple].Leaf.RadiationIntercepted
        VariableReference TrunkInterception: VariableName=[Apple].Trunk.EnergyBalance.RadiationInterceptedByDead
      Constant RowWidth: FixedValue=0
      MultiplyFunction TranspirationPerTree
        VariableReference Transpiration_mm: VariableName=[Leaf].Canopy.Transpiration
        VariableReference RowWidth: VariableName=[Apple].RowWidth
        VariableReference InterRowSpacing: VariableName=[Apple].InterRowSpacing
      Constant InterRowSpacing
      ProtectedDivideFunction CanopyArea: NumeratorErrVal=0; DenominatorErrVal=0
        MultiplyFunction CanopyAreaMM2
          VariableReference WidthMM: VariableName=[Apple].Width
          MinimumFunction
            VariableReference WidthMM: VariableName=[Apple].Width
            MultiplyFunction InterRowSpacingMM
              VariableReference InterRowSpacing: VariableName=[Apple].InterRowSpacing
              Constant MtoMM: FixedValue=1000; Units=mm per m
        Constant MM2toM2: FixedValue=1000000; Units=mm2 per m2
      ProtectedDivideFunction TranspirationPerLeafArea: NumeratorErrVal=0; DenominatorErrVal=0
        VariableReference Transpiration: VariableName=[RootUptakesArbitrator].WaterUptake.amount
        MultiplyFunction LeafArea
          VariableReference CanopyArea: VariableName=[Apple].CanopyArea
          VariableReference LAI: VariableName=[Leaf].Canopy.LAI
      Folder Varieties
        Cultivar Sturmer: Command=[Phenology].SpringDormancy.Target.FixedValue = 300
        Cultivar RedDelisious
        Cultivar PeasgoodNonsuch
        Cultivar GrannySmith
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